OpenVSP model (file version 5), 8 components.
Geometry view with OpenVSP parameter names; values to 6 digits, angles in degrees, lengths in the model's unit.
Overall bounding box: X_Min=0 X_Len=51.2782 Y_Min=-25.9323 Y_Len=51.8646 Z_Min=-3.07168 Z_Len=14.317

Wing "main_wing"
  location (X Y Z) 13.9355 0 2.45836, rotation 0 0 0
  symmetric about XZ
  bounding box size 15.4721 51.8646 4.29588
  totals: TotalSpan=57.6251 TotalProjectedSpan=51.7652 TotalChord=6.8387 TotalArea=396.926 TotalAR=6.75097 MAC=8.50923
  root: chord 11.6129, twist 0, airfoil file "NASA SC(2)-0714 AIRFOIL"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 BaseThickChord=0.139599 ThickChord=0.116798
  sections:
    n  Span     Root_Chord  Tip_Chord  Area     Sweep  Sweep_Location  Dihedral  Twist  Twist_Location  tip airfoil
    1  3.10591  11.6129     11.6129    36.0686  0      0.25            0         0      0.25            as above
    2  21.7028  11.6129     2.70967    155.42   25     0.25            -3        0      0.25            as above
    3  4.00378  2.70967     0.774192   6.97432  25     0.25            74        0      0.25            airfoil file "NASA SC(2)-0714 AIRFOIL"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 BaseThickChord=0.139599 ThickChord=0.5
  SS_Control "SS_CONT_0": UStart=0.405092 UEnd=0.539232 Length_C_Start=0.178571 Length_C_End=0.178571 Length_Start=2.03343 Length_End=0.967013 LE_Flag=0 Surf_Type=2
  SS_Control "SS_CONT_1": UStart=0.406498 UEnd=0.489474 Length_C_Start=0.0892857 Length_C_End=0.0892857 Length_Start=1.01112 Length_End=0.681293 LE_Flag=1 Surf_Type=2
  SS_Control "SS_CONT_2": UStart=0.407061 UEnd=0.539232 Length_C_Start=0.3 Length_C_End=0.3 Length_Start=3.38986 Length_End=1.62458 LE_Flag=0 Surf_Type=2
  SS_Control "SS_CONT_3": UStart=0.541018 UEnd=0.598242 Length_C_Start=0.16 Length_C_End=0.16 Length_Start=0.853721 Length_End=0.446109 LE_Flag=0 Surf_Type=2

Wing "vertical_stabilizer"
  location (X Y Z) 36.0274 0 3.20243, rotation 90 0 0
  bounding box size 14.2127 1.21854 8.04286
  totals: TotalSpan=7.5944 TotalProjectedSpan=7.5944 TotalChord=7.55802 TotalArea=57.3986 TotalAR=1.00481 MAC=7.55905
  root: chord 7.40562, twist 0, NACA 4-series Camber=0 CamberLoc=0.2 ThickChord=0.164449
  sections:
    n  Span    Root_Chord  Tip_Chord  Area     Sweep  Sweep_Location  Dihedral  Twist  Twist_Location  tip airfoil
    1  7.5944  7.40562     7.71042    57.3986  40.9   0.25            0         0      0.25            NACA 4-series Camber=0 CamberLoc=0.2 ThickChord=0.154331
  SS_Control "SS_CONT_0": UStart=0.340022 UEnd=0.614277 Length_C_Start=0.33333 Length_C_End=0.33333 Length_Start=2.47055 Length_End=2.55415 LE_Flag=0 Surf_Type=2

Wing "horizontal_stabilizer"
  location (X Y Z) 43.0218 0.21336 9.99439, rotation 0 0 0
  symmetric about XZ
  bounding box size 8.25647 20.5577 1.12489
  totals: TotalSpan=19.8392 TotalProjectedSpan=19.812 TotalChord=3.87096 TotalArea=76.7967 TotalAR=5.1111 MAC=4.07776
  root: chord 5.41934, twist 0, airfoil file "NASA SC(2)-0714 AIRFOIL"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 BaseThickChord=0.139599 ThickChord=0.155906
  sections:
    n  Span     Root_Chord  Tip_Chord  Area     Sweep  Sweep_Location  Dihedral  Twist  Twist_Location  tip airfoil
    1  9.91959  5.41934     2.32258    38.3984  27.47  0.25            3         0      0.25            as above
  SS_Control "SS_CONT_0": UStart=0.366667 UEnd=0.65 Length_C_Start=0.39 Length_C_End=0.39 Length_Start=1.99294 Length_End=0.966273 LE_Flag=0 Surf_Type=2

BodyOfRevolution "nacelle_"
  location (X Y Z) 10.5664 7.16128 0.588264, rotation 0 0 0
  bounding box size 5.03254 3.39279 3.39279
  Design: A0=5.70196 Ae=5.70196 Amin=4.39236 AminW=0.396425 Angle=0 Diameter=2.69443 Mode=0
  profile: NACA 4-series Camber=0.02 CamberLoc=0.4 Chord=5.03225 ThickChord=0.1

BodyOfRevolution "nacelle_2"
  location (X Y Z) 14.5796 14.7096 0.161544, rotation 0 0 0
  bounding box size 5.03254 3.39279 3.39279
  Design: A0=5.70196 Ae=5.70196 Amin=4.39236 AminW=0.396425 Angle=0 Diameter=2.69443 Mode=0
  profile: NACA 4-series Camber=0.02 CamberLoc=0.4 Chord=5.03225 ThickChord=0.1

BodyOfRevolution "nacelle_3"
  location (X Y Z) 10.5664 -7.16128 0.588264, rotation 0 0 0
  bounding box size 5.03254 3.39279 3.39279
  Design: A0=5.70196 Ae=5.70196 Amin=4.39236 AminW=0.396425 Angle=0 Diameter=2.69443 Mode=0
  profile: NACA 4-series Camber=0.02 CamberLoc=0.4 Chord=5.03225 ThickChord=0.1

BodyOfRevolution "nacelle_4"
  location (X Y Z) 14.5796 -14.7096 0.161544, rotation 0 0 0
  bounding box size 5.03254 3.39279 3.39279
  Design: A0=5.70196 Ae=5.70196 Amin=4.39236 AminW=0.396425 Angle=0 Diameter=2.69443 Mode=0
  profile: NACA 4-series Camber=0.02 CamberLoc=0.4 Chord=5.03225 ThickChord=0.1

Fuselage "fuselage"
  location (X Y Z) 0 0 0, rotation 0 0 0
  bounding box size 45.8965 8.90858 6.37284
  Design: Length=45.8965
  cross sections:
    n   XLocPercent  YLocPercent  ZLocPercent  shape
    0   0            0            -0.0025      point
    1   0.02256      0            -0.0025      ellipse Ellipse_Height=2.33248 Ellipse_Width=2.27152
    2   0.056        0            -0.0035      ellipse Ellipse_Height=3.61798 Ellipse_Width=3.52044
    3   0.11607      0            0.0025       ellipse Ellipse_Height=5.49189 Ellipse_Width=5.49189
    4   0.1738       0            0.0025       ellipse Ellipse_Height=6.27644 Ellipse_Width=6.91286
    5   0.2783       0            0.0025       as above
    6   0.3036       0            0.0025       ellipse Ellipse_Height=6.27644 Ellipse_Width=8.80445
    7   0.5482       0            0.0025       as above
    8   0.6072       0            0.008        ellipse Ellipse_Height=5.80034 Ellipse_Width=6.91286
    9   0.7935       0            0.027        ellipse Ellipse_Height=4.03647 Ellipse_Width=6.91286
    10  0.959        0            0.045        ellipse Ellipse_Height=2.00101 Ellipse_Width=2.52984
    11  0.962        0            0.04         ellipse Ellipse_Height=1.51333 Ellipse_Width=2.52984
    12  1            0            0.04         point
